<?xml version="1.0"?>
<!--
  File:     Bramo323.xml
  Author:   Aero-Matic v 0.82

  Inputs:
    name:           Bramo323
    type:           piston
    power:          1200 hp
    augmented?      no
    injected?       yes
-->

<piston_engine name="Bramo323">
	<minmp unit="INHG">  6.0 </minmp>
	<maxmp unit="INHG"> 28.5 </maxmp>
	<displacement unit="IN3"> 1636.80 </displacement>
	<maxhp>        1200.00 </maxhp>
	<cycles>         4.0 </cycles>
	<idlerpm>      400.0 </idlerpm>
	<maxrpm>      3000.0 </maxrpm>
	<maxthrottle>    1.0 </maxthrottle><!-- Deprecated -->
	<minthrottle>    0.1 </minthrottle><!-- Deprecated -->
	<sparkfaildrop>  0.1 </sparkfaildrop>
	<volumetric-efficiency> 0.85 </volumetric-efficiency>
	<!-- Optional items that affect engine performance -->
	<!-- Defining <bsfc> over-rides the built-in horsepower calculations -->
	<bsfc>           0.20 </bsfc>
	<stroke unit="IN">  6.30  </stroke>
	<bore unit="IN">    6.06 </bore>
	<cylinders> 9.0  </cylinders>
	<compression-ratio> 12.0 </compression-ratio>
	<!-- numboostspeed>2</numboostspeed>
	<boostmanual>1</boostmanual>
	<boostoverride>1</boostoverride>
	<ratedboost1 unit="INHG"> 18.1 </ratedboost1>
	<ratedpower1 unit="HP"> 1490 </ratedpower1>
	<ratedrpm1> 2400 </ratedrpm1>
	<ratedaltitude1 unit="FT"> 14000 </ratedaltitude1>
	<ratedboost2 unit="INHG"> 24.1 </ratedboost2>
	<ratedpower2 unit="HP"> 2090 </ratedpower2>
	<ratedrpm2> 2800 </ratedrpm2>
	<ratedaltitude2 unit="FT"> 16000 </ratedaltitude2 -->
</piston_engine>
